// COMSOL Multiphysics 6.0.0.318 model "SOR.mph"
// Outline of the model tree
// Unit system: none

Parameters
  k1init = 10000
  k2init = 10000
  k3init = 100
  k5init = 0.0001
  k6init = 2
  k8init = 1
  k9init = 1
  k10init = 1
  k11init = 1
  K2init = 100000
  K4init = 0.05
  t_end = 2
  scaller = 2

Functions
  step1: Step | funcname = step; location = 5; from = 1; to = 0

Variables
  var1 "Variables"
    light = step(t)
    Hin0 = 1
    DH0 = 1
    Pyr0 = 0
  var2 "Constants (C)"
    k1 = 10000
    k2 = 10000
    k3 = 100
    k4 = K2*k5
    k5 = 0.0001
    k6 = 2
    k7 = K4*k8
    k8 = 1
    k9 = 1
    k10 = 10
    k11 = 0.1
    K2 = 100000
    K4 = 0.05
  var3 "Rates (R)"
    R1 = k1*Hin*DH*light
    R2 = k2*Hin_m*DH_p
    R3 = k3*HinH*D
    R4 = k4*HinH*HinH
    R5 = k5*Hin*Pyr
    R6 = k6*Hin*HinHD
    R7 = k7*HinD
    R8 = k8*Hin*D
    R9 = k9*HinHD
    R10 = k10*D*D
    R11 = k11*Hin

Physics
  ge: GlobalEquations "Global ODEs and DAEs"
    ge1: GlobalEquations "Mechanism (M)"
      name = {Hin, DH, Hin_m, DH_p, HinH, D, HinHD, Pyr, HinD, WTF}
      equation = {-Hint + -R1 + R4 - R5 - R6 + R7 - R8 - R11, -DHt + -R1, -Hin_mt + R1 - R2, -DH_pt + R1 - R2, -HinHt + R2 - R3 - 2*R4 + 2*R5 + R6, -Dt + R2 - R3 + R7 - R8 - 2*R10, -HinHDt + R3 - R6 - R9, -Pyrt + R4 - R5 + R9, -HinDt + R6 - R7 + R8, -WTFt + R9 + R10 + R11}
      initialValueU = {Hin0, DH0, 0, 0, 0, 0, 0, Pyr0, 0, 0}
      initialValueUt = {0, 0, 0, 0, 0, 0, 0, 0, 0, 0}
      description = {, , , , , , , , , }
      valueType = complex
      DependentVariableQuantity = dimensionless
      CustomDependentVariableUnit = m
      SourceTermQuantity = dimensionless
      CustomSourceTermUnit = m
  opt: GeneralOptimization
    gcvar1: GlobalControlVariables

Studies
  std1 "Study 1"
    opt: Optimization (disabled) | objectivetype = maximization
    time: Transient "Time Dependent" | tlist = range(0,(t_end-0)/99,t_end)

Solver configurations
  sol1 "Solution 1" (study std1)
    v1: Variables "Dependent Variables 1"
    t1: Time "Time-Dependent Solver 1" | tlist = range(0,(t_end-0)/99,t_end)
      dDef: Direct
      fc1: FullyCoupled | linsolver = dDef

Datasets
  dset1: Solution | solution = sol1

Derived values
  gev1: EvalGlobal "Global Evaluation 1"
    data = dset1
    expr = {Hin, DH, Hin_m, DH_p, HinH, D, HinHD, Pyr, HinD, WTF}
    descr = {State variable Hin, State variable DH, State variable Hin_m, State variable DH_p, State variable HinH, State variable D, State variable HinHD, State variable Pyr, State variable HinD, State variable WTF}

Tables
  mrkvl1: Table "Maximum and Minimum Values"
    // Graph marker
    Time | light
    0 | 1
    0 | 1

Plots
  pg1: PlotGroup1D "Plots" | data = dset1; xlabel = Time; ylabel = Concentration
    glob3: Global "light" | expr = light; autoexpr = on
    glob1: Global "Important" | expr = {Hin, DH, D, Pyr}; descriptionintitle = off; unitintitle = off; autoexpr = on
    glob2: Global "Not important"
      expr = {Hin_m, DH_p, WTF, HinHD, HinH, HinD}
      descriptionintitle = off
      unitintitle = off
      autoexpr = on

Methods
  method1: CodeEditor
    public class method1 extends ApplicationMethod {
      public void execute() {
        model.sol("sol1").study("std1");
        with(model.study("std1").feature("time"));
          set("notlistsolnum", 1);
          set("notsolnum", "auto");
          set("listsolnum", 1);
          set("solnum", "auto");
        endwith();
        model.sol("sol1").feature().remove("t1");
        model.sol("sol1").feature().remove("v1");
        model.sol("sol1").feature().remove("st1");
        model.sol("sol1").create("st1", "StudyStep");
        with(model.sol("sol1").feature("st1"));
          set("study", "std1");
          set("studystep", "time");
        endwith();
        model.sol("sol1").create("v1", "Variables");
        with(model.sol("sol1").feature("v1"));
          set("control", "time");
        endwith();
        model.sol("sol1").create("t1", "Time");
        with(model.sol("sol1").feature("t1"));
          set("tlist", "range(0,0.01,10)");
          set("plot", "off");
          set("plotgroup", "pg1");
          set("plotfreq", "tout");
          set("probesel", "all");
          set("probes", new String[]{});
          set("probefreq", "tsteps");
          set("atolglobalvaluemethod", "factor");
          set("endtimeinterpolation", true);
          set("control", "time");
        endwith();
        model.sol("sol1").feature("t1").create("fc1", "FullyCoupled");
        with(model.sol("sol1").feature("t1").feature("fc1"));
          set("linsolver", "dDef");
        endwith();
        model.sol("sol1").feature("t1").feature().remove("fcDef");
        model.sol("sol1").attach("std1");
        model.sol("sol1").runAll();
        model.result("pg1").run();
      }
    }